*Heading
Example RVE simulation
*Node
1,	0.000000e+00,	0.000000e+00
2,	2.500000e-03,	0.000000e+00
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*Element, type=CPS4R
1,	52,	1,	2,	53,
2,	53,	2,	3,	54,
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*Elset, elset=SET-0
6
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*Solid Section, elset=SET-0, material=MAT-0
1.
*Material, name=MAT-0
*Density
2.650000e-15
*Elastic
5.000000e+05, 1.500000e-01
*Elset, elset=SET-1
1
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*Solid Section, elset=SET-1, material=MAT-1
1.
*Material, name=MAT-1
*Density
1.180000e-15
*Elastic
1.850000e+00, 3.500000e-01
*Viscoelastic, frequency=TABULAR
1.664865e-01, 0.000000e+00, 1.664865e-01, 0.000000e+00, 3.735114e-09
1.886486e-01, -3.783784e-02, 1.886486e-01, -3.783784e-02, 5.662013e-09
1.918919e-01, -7.027027e-02, 1.918919e-01, -7.027027e-02, 8.552291e-09
1.918919e-01, -1.027027e-01, 1.918919e-01, -1.027027e-01, 1.295444e-08
1.918919e-01, -1.243243e-01, 1.918919e-01, -1.243243e-01, 1.502207e-08
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1.702703e+02, -1.944946e+03, 1.702703e+02, -1.944946e+03, 3.002347e+23
*Elset, elset=SET-2
91
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*Solid Section, elset=SET-2, material=MAT-2
1.
*Material, name=MAT-2
*Density
1.180000e-15
*Elastic
1.850000e+00, 3.500000e-01
*Viscoelastic, frequency=TABULAR
1.664865e-01, 0.000000e+00, 1.664865e-01, 0.000000e+00, 4.500000e-03
1.886486e-01, -3.783784e-02, 1.886486e-01, -3.783784e-02, 5.670000e-03
1.918919e-01, -7.027027e-02, 1.918919e-01, -7.027027e-02, 7.130000e-03
1.918919e-01, -1.027027e-01, 1.918919e-01, -1.027027e-01, 8.980000e-03
1.918919e-01, -1.243243e-01, 1.918919e-01, -1.243243e-01, 9.750000e-03
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1.702703e+02, -1.944946e+03, 1.702703e+02, -1.944946e+03, 8.000000e+17
*Nset, nset=LeftSurface
1
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*Nset, nset=RightSurface
51
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*Equation
3
LeftSurface, 1, 1.
RightSurface, 1, -1.
2602, 1, 1.
*Equation
2
LeftSurface, 2, 1.
RightSurface, 2, -1.
*Nset, nset=BotmSurface
2
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*Nset, nset=TopSurface
2552
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*Equation
2
BotmSurface, 1, 1.
TopSurface, 1, -1.
*Equation
2
BotmSurface, 2, 1.
TopSurface, 2, -1.
*Nset, nset=BotmRight
51
*Nset, nset=TopRight
2601
*Equation
2
BotmRight, 1, 1.
TopRight, 1, -1.
*Equation
2
BotmRight, 2, 1.
TopRight, 2, -1.
*STEP,NAME=STEP-1,PERTURBATION
*STEADY STATE DYNAMICS, DIRECT
1e-07, 100000.0, 30, 1
*Nset, nset=drive
2602
*Boundary, type=displacement
2602, 1, 1, 0.005
*RESTART,WRITE,frequency=0
*Output, field, variable=PRESELECT
*Output, field
*Element output, directions=YES
ELEDEN, ELEN, ENER, EVOL
*Output, history
*Energy Output
ALLAE, ALLCD, ALLEE, ALLFD, ALLJD, ALLKE, ALLPD, ALLSD, ALLSE, ALLVD, ALLWK, ETOTAL
*END STEP
